# REAX potential for CHO system
# .....
#/atom 1 hydrogen
#/atom 2 carbon
#/atom 3 oxygen
#/bond 1 3 1.9
#/bond 1 2 2.0
#/bond 2 3 2.0
#/bond 3 3 2.0
#/bond 2 2 2.0

units		real

atom_style	charge
read_data	data.CHO

pair_style	reax/c lmp_control
pair_coeff	* * ffield.reax.cho H C O

neighbor	2 bin
neigh_modify	every 10 delay 0 check no

fix		1 all nve
fix             2 all qeq/reax 1 0.0 10.0 1e-6 param.qeq
fix             3 all temp/berendsen 500.0 500.0 100.0
group oxygen type 3

velocity oxygen set 0.01 NULL NULL sum yes units box


timestep	0.25
run 100000
