#/atom 1 silicon
#/atom 2 oxygen
#/bond 1 2 2.6
log none
units		metal
boundary	p p p

atom_style	atomic

read_data	betacristobalite.data

replicate 5 5 5

pair_style 	vashishta
pair_coeff	* * ../../potentialparameters/SiO2.vashishta Si O
mass            1 28.08
mass            2 15.9994

velocity	all create 300.0 277387 mom yes

fix nvt all nvt temp 300 300 1.0
thermo_style custom step press ke
thermo		1
timestep	0.002
