#/atom 2 1.0 #ff0000
log none
units		lj
atom_style	atomic

lattice		fcc 0.8442
region		box block 0 10 0 10 0 10
create_box	1 box
create_atoms	1 box
mass		1 1.0

velocity	all create 1.44 87287 loop geom

pair_style	lj/cut/opt 2.5
pair_coeff	1 1 1.0 1.0 2.5

fix		nve all nve
